# H Bro udregninger
# PNP Transistor base modstande
β := 290  # Gain på transistoren
I_c == β*I_B  # Transistor formel
I_c := 500 mA  # Ønskede strøm
V_kilde := 5 V  # Kildespændingen
I_B := I_c/β = 1.72414 mA  # Udregning
D_drop := 0.7 V  # Spændings tab over diode
# Spændingstab over darlington
R_B := (V_kilde - D_drop)/I_B = 2.494 kΩ
4.2 V/(500 mA) = 8.4 Ω
I_B := (5 V - 0.7 V)/(150 Ω) = 28.6667 mA
